<?xml version="1.0"?>
<!--
  File:     ASH-62IR.xml
  Author:   BOG, Yurik

  Inputs:
    name:           ASH-62IR
    type:           piston
    power:          1000.0 hp
    augmented?      no
    injected?       no
-->
<piston_engine name="ASH-62IR">
	<minmp unit="INHG"> 5.0 </minmp>
	<maxmp unit="INHG"> 41.4 </maxmp>
	<displacement unit="LTR"> 29.87 </displacement>
	<bsfc>0.32</bsfc>
	<maxhp unit="HP"> 1000 </maxhp>
	<cycles> 4 </cycles>
	<idlerpm> 500 </idlerpm>
	<maxthrottle> 1.0 </maxthrottle>
	<minthrottle> 0.05 </minthrottle>
	<boostoverride> 0 </boostoverride>
	<numboostspeeds> 1 </numboostspeeds>
	<takeoffboost unit="INHG"> 12 </takeoffboost>
	<ratedboost1 unit="INHG"> 6 </ratedboost1>
	<ratedpower1 unit="HP"> 1000 </ratedpower1>
	<ratedrpm1> 2200 </ratedrpm1>
	<sparkfaildrop> 0.1 </sparkfaildrop>
	<ratedaltitude1 unit="M"> 2000 </ratedaltitude1>
</piston_engine>
