<?xml version="1.0"?>
<?xml-stylesheet type="text/xsl" href="http://jsbsim.sourceforge.net/JSBSim.xsl"?>
<fdm_config name="AN-2" version="2.0" release="PRODUCTION"
    xmlns:xsi="http://www.w3.org/2001/XMLSchema-instance"
    xsi:noNamespaceSchemaLocation="http://jsbsim.sourceforge.net/JSBSim.xsd">

    <fileheader>
        <author> Yurik V. Nikiforoff </author>
        <filecreationdate> mar 2010 </filecreationdate>
        <description> Legendary Russian AN-2 v2.0 </description>
        <version> 2.0 </version>
    </fileheader>

    <metrics>
        <wingarea unit="M2"> 71.52 </wingarea><!--71.52-->
        <wingspan unit="M"> 18.17 </wingspan>
        <chord unit="M"> 2.269 </chord>
        <wing_incidence unit="DEG"> 3.0 </wing_incidence>
        <htailarea unit="FT2"> 162 </htailarea>
        <htailarm unit="FT"> 23.62 </htailarm>
        <vtailarea unit="FT2"> 138.58 </vtailarea>
        <vtailarm unit="FT"> 20.34 </vtailarm>
	<!--CoG,m: 3.2 + 2.269*Cog,%-->
        <location name="AERORP" unit="M">
            <x> 3.7 </x>
            <y> 0.0 </y>
            <z> 0.33 </z>
        </location>
        <location name="EYEPOINT" unit="M">
            <x> 2.81 </x>
            <y> 0 </y>
            <z> 0.87 </z>
        </location>
        <location name="VRP" unit="M">
            <x> 3.8 </x>
            <y> 0.0 </y>
            <z> 0.0 </z>
        </location>
    </metrics>

    <mass_balance>
        <ixx unit="SLUG*FT2">14637</ixx>
        <iyy unit="SLUG*FT2">11455</iyy>
        <izz unit="SLUG*FT2">28772</izz>
        <ixz unit="SLUG*FT2">0</ixz>
        <iyz unit="SLUG*FT2">0</iyz>
        <ixy unit="SLUG*FT2">0</ixy>
        <emptywt unit="KG">3300</emptywt>
        <location name="CG" unit="M">
            <x>3.68</x>
            <y>0</y>
            <z>0.33</z>
        </location>
        <pointmass name="crew">
            <weight unit="KG">160.0</weight>
            <location unit="M">
                <x>2.76</x>
                <y>0</y>
                <z>0.2</z>
            </location>
        </pointmass>
        <pointmass name="cargo">
            <weight unit="KG">500</weight>
            <location unit="M">
                <x>4.3</x>
                <y>0</y>
                <z>-0.25</z>
            </location>
        </pointmass>
    </mass_balance>

    <ground_reactions>
        <contact type="BOGEY" name="LEFT_MAIN">
            <location unit="M">
                <x> 2.74 </x>
                <y> -1.66 </y>
                <z> -2.488 </z>
            </location>
            <static_friction> 0.8 </static_friction>
            <dynamic_friction> 0.5 </dynamic_friction>
            <rolling_friction> 0.02 </rolling_friction>
            <spring_coeff unit="LBS/FT"> 5000 </spring_coeff>
            <damping_coeff unit="LBS/FT/SEC"> 2425.5 </damping_coeff>
            <max_steer unit="DEG"> 0 </max_steer>
            <brake_group> LEFT </brake_group>
            <retractable> 0 </retractable>
        </contact>
        <contact type="BOGEY" name="RIGHT_MAIN">
            <location unit="M">
		    <x> 2.74 </x>
		    <y> 1.66 </y>
		    <z> -2.488 </z>
            </location>
            <static_friction> 0.8 </static_friction>
            <dynamic_friction> 0.5 </dynamic_friction>
            <rolling_friction> 0.02 </rolling_friction>
            <spring_coeff unit="LBS/FT"> 5000 </spring_coeff>
            <damping_coeff unit="LBS/FT/SEC"> 2425.5 </damping_coeff>
            <max_steer unit="DEG"> 0 </max_steer>
            <brake_group> RIGHT </brake_group>
            <retractable> 0 </retractable>
        </contact>
        <contact type="BOGEY" name="TAIL">
            <location unit="M">
                <x> 10.7 </x>
                <y> 0.0 </y>
                <z> -0.78 </z>
            </location>
            <static_friction> 0.8 </static_friction>
            <dynamic_friction> 0.5 </dynamic_friction>
            <rolling_friction> 0.02 </rolling_friction>
            <spring_coeff unit="LBS/FT"> 10000 </spring_coeff>
            <damping_coeff unit="LBS/FT/SEC"> 1000 </damping_coeff>
            <max_steer unit="DEG"> -80 </max_steer>
            <brake_group> NONE </brake_group>
            <retractable> 0 </retractable>
        </contact>
        <contact type="STRUCTURE" name="LEFT_UP_WING">
            <location unit="M">
                <x> 3.853 </x>
                <y> -8.96 </y>
                <z> 1.652 </z>
            </location>
            <static_friction> 0.8 </static_friction>
            <dynamic_friction> 0.5 </dynamic_friction>
            <rolling_friction> 0 </rolling_friction>
            <spring_coeff unit="LBS/FT"> 12127.5 </spring_coeff>
            <damping_coeff unit="LBS/FT/SEC"> 2425.5 </damping_coeff>
            <max_steer unit="DEG"> 0 </max_steer>
            <brake_group> NONE </brake_group>
            <retractable> 0 </retractable>
        </contact>

	<contact type="STRUCTURE" name="LEFT_DN_WING">
		<location unit="M">
			<x> 3.9 </x>
			<y> -6.8 </y>
			<z> -0.489 </z>
		</location>
		<static_friction> 0.8 </static_friction>
		<dynamic_friction> 0.5 </dynamic_friction>
		<rolling_friction> 0 </rolling_friction>
		<spring_coeff unit="LBS/FT"> 12127.5 </spring_coeff>
		<damping_coeff unit="LBS/FT/SEC"> 2425.5 </damping_coeff>
		<max_steer unit="DEG"> 0 </max_steer>
		<brake_group> NONE </brake_group>
		<retractable> 0 </retractable>
	</contact>

	<contact type="STRUCTURE" name="RIGHT_UP_WING">
		<location unit="M">
			<x> 3.853 </x>
			<y> 8.96 </y>
			<z> 1.652 </z>
		</location>
		<static_friction> 0.8 </static_friction>
		<dynamic_friction> 0.5 </dynamic_friction>
		<rolling_friction> 0 </rolling_friction>
		<spring_coeff unit="LBS/FT"> 12127.5 </spring_coeff>
		<damping_coeff unit="LBS/FT/SEC"> 2425.5 </damping_coeff>
		<max_steer unit="DEG"> 0 </max_steer>
		<brake_group> NONE </brake_group>
		<retractable> 0 </retractable>
	</contact>

	<contact type="STRUCTURE" name="RIGHT_DN_WING">
		<location unit="M">
			<x> 3.9 </x>
			<y> 6.8 </y>
			<z> -0.489 </z>
		</location>
		<static_friction> 0.8 </static_friction>
		<dynamic_friction> 0.5 </dynamic_friction>
		<rolling_friction> 0 </rolling_friction>
		<spring_coeff unit="LBS/FT"> 12127.5 </spring_coeff>
		<damping_coeff unit="LBS/FT/SEC"> 2425.5 </damping_coeff>
		<max_steer unit="DEG"> 0 </max_steer>
		<brake_group> NONE </brake_group>
		<retractable> 0 </retractable>
	</contact>

	<contact type="STRUCTURE" name="TAIL_TOP">
		<location unit="M">
			<x> 11.0 </x>
			<y> 0.0 </y>
			<z> 3.452 </z>
		</location>
		<static_friction> 0.8 </static_friction>
		<dynamic_friction> 0.5 </dynamic_friction>
		<rolling_friction> 0 </rolling_friction>
		<spring_coeff unit="LBS/FT"> 12127.5 </spring_coeff>
		<damping_coeff unit="LBS/FT/SEC"> 2425.5 </damping_coeff>
		<max_steer unit="DEG"> 0 </max_steer>
		<brake_group> NONE </brake_group>
		<retractable> 0 </retractable>
	</contact>

	<contact type="STRUCTURE" name="NOSE">
		<location unit="M">
			<x> 0.0 </x>
			<y> 0.0 </y>
			<z> 0.0 </z>
		</location>
		<static_friction> 0.8 </static_friction>
		<dynamic_friction> 0.5 </dynamic_friction>
		<rolling_friction> 0 </rolling_friction>
		<spring_coeff unit="LBS/FT"> 12127.5 </spring_coeff>
		<damping_coeff unit="LBS/FT/SEC"> 2425.5 </damping_coeff>
		<max_steer unit="DEG"> 0 </max_steer>
		<brake_group> NONE </brake_group>
		<retractable> 0 </retractable>
	</contact>

    </ground_reactions>

    <propulsion>
        <engine file="ASH-62IR">
            <location unit="IN">
                <x> 36 </x>
                <y> 0 </y>
                <z> 0 </z>
            </location>
            <orient unit="DEG">
                <roll> 0 </roll>
                <pitch> 0 </pitch>
                <yaw> 0 </yaw>
            </orient>
            <feed>0</feed>
            <thruster file="AV-2">
                <location unit="IN">
                    <x> 36 </x>
                    <y> 0 </y>
                    <z> 0 </z>
                </location>
                <orient unit="DEG">
                    <roll> 0 </roll>
                    <pitch> 0 </pitch>
                    <yaw> 0 </yaw>
                </orient>
            </thruster>
        </engine>
        <tank type="FUEL"> <!-- collector -->
            <location unit="IN">
                <x> 157.5 </x>
                <y> 0 </y>
                <z> 0 </z>
            </location>
            <capacity unit="LBS">0.12</capacity> <!-- 0.02 gal * 6 lb/gal, see Nasal/fuel.nas -->
	    <contents unit="LBS">0</contents>
            <type>AVGAS</type>
        </tank>
        <tank type="FUEL"> <!-- right wing -->
            <location unit="IN">
                <x> 157.5 </x>
                <y> 70 </y>
                <z> 0 </z>
            </location>
            <capacity unit="KG">432</capacity> <!-- 600 l * 0.72 kg/l -->
            <contents unit="LBS">0</contents>
            <priority>0</priority>
            <type>AVGAS</type>
        </tank>
        <tank type="FUEL"> <!-- left wing -->
            <location unit="IN">
                <x> 157.5 </x>
                <y> -70 </y>
                <z> 0 </z>
            </location>
            <capacity unit="KG">432</capacity> <!-- 600 l * 0.72 kg/l -->
            <contents unit="LBS">0</contents>
            <priority>0</priority>
            <type>AVGAS</type>
        </tank>
    </propulsion>

    <flight_control name="AN-2">

        <channel name="Pitch">

            <summer name="Pitch Trim Sum">
              <input>fcs/elevator-cmd-norm</input>
              <input>fcs/pitch-trim-cmd-norm</input>
              <clipto>
                <min>-1</min>
                <max>1</max>
              </clipto>
              <output>fcs/elevator-pos-norm</output>
            </summer>

            <aerosurface_scale name="Elevator Control">
              <input>fcs/pitch-trim-sum</input>
              <range>
                <min>-0.35</min>
                <max>0.3</max>
              </range>
              <output>fcs/elevator-pos-rad</output>
            </aerosurface_scale>

        </channel>

        <channel name="Roll">

            <summer name="Roll Trim Sum">
              <input>fcs/aileron-cmd-norm</input>
              <input>fcs/roll-trim-cmd-norm</input>
              <clipto>
                <min>-1</min>
                <max>1</max>
              </clipto>
            </summer>

            <aerosurface_scale name="Left Aileron Control">
              <input>fcs/roll-trim-sum</input>
              <range>
                <min>-0.35</min>
                <max>0.35</max>
              </range>
              <output>fcs/left-aileron-pos-rad</output>
            </aerosurface_scale>

            <aerosurface_scale name="Left Aileron Control norm">
              <input>fcs/roll-trim-sum</input>
              <range>
                <min>-1</min>
                <max>1</max>
              </range>
              <output>fcs/left-aileron-pos-norm</output>
            </aerosurface_scale>

            <aerosurface_scale name="Right Aileron Control">
              <input>fcs/roll-trim-sum</input>
              <range>
                <min>-0.35</min>
                <max>0.35</max>
              </range>
              <output>fcs/right-aileron-pos-rad</output>
            </aerosurface_scale>

            <aerosurface_scale name="Right Aileron Control norm">
              <input>fcs/roll-trim-sum</input>
              <range>
                <min>-1</min>
                <max>1</max>
              </range>
              <output>fcs/right-aileron-pos-norm</output>
            </aerosurface_scale>

        </channel>

        <channel name="Yaw">

            <summer name="Rudder Command Sum">
              <input>fcs/rudder-cmd-norm</input>
              <input>fcs/yaw-trim-cmd-norm</input>
            </summer>

            <aerosurface_scale name="Rudder Control">
              <input>fcs/rudder-command-sum</input>
              <range>
                <min>-0.35</min>
                <max>0.35</max>
              </range>
              <output>fcs/rudder-pos-rad</output>
            </aerosurface_scale>

            <aerosurface_scale name="Rudder Sum">
              <input>fcs/rudder-command-sum</input>
              <range>
                <min>-1</min>
                <max>1</max>
              </range>
              <output>fcs/rudder-pos-norm</output>
            </aerosurface_scale>

        </channel>

        <channel name="Flaps">

            <kinematic name="Flaps Control">
              <input>fcs/flap-cmd-norm</input>
              <traverse>
                <setting>
                  <position>0</position>
                  <time>0</time>
                </setting>
                <setting>
                  <position>10</position>
                  <time>3.05</time>
                </setting>
                <setting>
                  <position>20</position>
                  <time>3.05</time>
                </setting>
                <setting>
                  <position>30</position>
                  <time>3.05</time>
                </setting>
                <setting>
                  <position>40</position>
                  <time>3.05</time>
                </setting>
              </traverse>
              <output>fcs/flap-pos-deg</output>
            </kinematic>

            <aerosurface_scale name="Flap Position Normalizer">
              <input>fcs/flap-pos-deg</input>
              <domain>
                <min>0</min>
                <max>40</max>
              </domain>
              <range>
                <min>0</min>
                <max>1</max>
              </range>
              <output>fcs/flap-pos-norm</output>
            </aerosurface_scale>

        </channel>

        <channel name="Speedbrake">

	<switch name="fcs/slats-custom">
		<default value="0.0"/>
		<test value="1.0">
			aero/alpha-deg gt 15
		</test>
		<output>fcs/speedbrake-cmd-norm</output>
	</switch>


            <kinematic name="Speedbrake Control">
              <input>fcs/speedbrake-cmd-norm</input>
              <traverse>
                <setting>
                  <position>0</position>
                  <time>0</time>
                </setting>
                <setting>
                  <position>1</position>
                  <time>1</time>
                </setting>
              </traverse>
              <output>fcs/speedbrake-pos-norm</output>
            </kinematic>

        </channel>

    </flight_control>
    <system file="engine"/>
    <system file="fuel"/>
    <aerodynamics>
        <function name="aero/function/kCLge">
            <description>Change_in_lift_due_to_ground_effect</description>
            <product>
                <table>
                    <independentVar>aero/h_b-mac-ft</independentVar>
                    <tableData>
                      0             1.203
                      0.1           1.127
                      0.15          1.09
                      0.2           1.073
                      0.3           1.046
                      0.4           1.055
                      0.5           1.019
                      0.6           1.013
                      0.7           1.008
                      0.8           1.006
                      0.9           1.003
                      1             1.002
                      1.1           1
                    </tableData>
                </table>
            </product>
        </function>
        <axis name="LIFT" unit="LBS">
            <function name="aero/coefficient/CLalpha">
                <description>Lift_due_to_alpha</description>
                <product>
                    <property>aero/qbar-psf</property>
                    <property>metrics/Sw-sqft</property>
                    <property>aero/function/kCLge</property>
                    <table>
                        <independentVar lookup="row">aero/alpha-wing-rad</independentVar>
                        <independentVar lookup="column">fcs/speedbrake-pos-norm</independentVar>
                        <tableData>
                                       0             1
                          -0.175        -0.9        -0.9
			  -0.0175         0.0         0.0
			  0.175         0.9         0.9
			  0.21         1.0         1.0
			  0.28         1.2         1.25
			  0.314         1.23        1.37
			  0.35         1.19        1.5
			  0.42         0.7         1.67
			  0.49         0.5         1.4
                        </tableData>
                    </table>
                </product>
            </function>
            <function name="aero/coefficient/dCLflap">
                <description>Delta_Lift_due_to_flaps</description>
                <product>
                    <property>aero/qbar-psf</property>
                    <property>metrics/Sw-sqft</property>
                    <property>fcs/flap-pos-deg</property>
                    <value>0.03</value>
                </product>
            </function>
            <function name="aero/coefficient/dCLsb">
                <description>Delta_Lift_due_to_speedbrake</description>
                <product>
                    <property>aero/qbar-psf</property>
                    <property>metrics/Sw-sqft</property>
                    <property>fcs/speedbrake-pos-norm</property>
                    <value>0</value>
                </product>
            </function>
            <function name="aero/coefficient/CLde">
                <description>Lift_due_to_Elevator_Deflection</description>
                <product>
                    <property>aero/qbar-psf</property>
                    <property>metrics/Sw-sqft</property>
                    <property>fcs/elevator-pos-rad</property>
                    <value>0.2</value>
                </product>
            </function>
        </axis>
        <axis name="DRAG" unit="LBS">
            <function name="aero/coefficient/CD0">
                <description>Drag_at_zero_lift</description>
                <product>
                    <property>aero/qbar-psf</property>
                    <property>metrics/Sw-sqft</property>
                    <table>
                        <independentVar>aero/alpha-wing-rad</independentVar>
			<independentVar lookup="column">fcs/speedbrake-pos-norm</independentVar>
                        <tableData>
                                        0            1
                          -0.175       0.13         0.13
                          -0.0175        0.027        0.027
			  0.104         0.06         0.06
			  0.183        0.1          0.1
			  0.28        0.21         0.18
			  0.314        0.27         0.21
			  0.35        0.35         0.27
			  0.42        0.5          0.34
                        </tableData>
                    </table>
                </product>
            </function>
            <function name="aero/coefficient/CDi">
                <description>Induced_drag</description>
                <product>
                    <property>aero/qbar-psf</property>
                    <property>metrics/Sw-sqft</property>
                    <property>aero/cl-squared</property>
                    <value>0.041</value><!--0.041-->
                </product>
            </function>
            <function name="aero/coefficient/CDmach">
                <description>Drag_due_to_mach</description>
                <product>
                    <property>aero/qbar-psf</property>
                    <property>metrics/Sw-sqft</property>
                    <table>
                        <independentVar>velocities/mach</independentVar>
                        <tableData>
                          0             0
                          0.72          0
                          1.1           0.023
                          1.8           0.015
                        </tableData>
                    </table>
                </product>
            </function>
            <function name="aero/coefficient/CDflap">
                <description>Drag_due_to_flaps</description>
                <product>
                    <property>aero/qbar-psf</property>
                    <property>metrics/Sw-sqft</property>
                    <property>fcs/flap-pos-deg</property>
                    <value>0.0013</value>
                </product>
            </function>
            <function name="aero/coefficient/CDsb">
                <description>Drag_due_to_speedbrakes</description>
                <product>
                    <property>aero/qbar-psf</property>
                    <property>metrics/Sw-sqft</property>
                    <property>fcs/speedbrake-pos-norm</property>
                    <value>0.03</value><!--0.03-->
                </product>
            </function>
            <function name="aero/coefficient/CDbeta">
                <description>Drag_due_to_sideslip</description>
                <product>
                    <property>aero/qbar-psf</property>
                    <property>metrics/Sw-sqft</property>
                    <table>
                        <independentVar>aero/beta-rad</independentVar>
                        <tableData>
                          -1.57         1.23
                          -0.26         0.05
                          0             0
                          0.26          0.05
                          1.57          1.23
                        </tableData>
                    </table>
                </product>
            </function>
            <function name="aero/coefficient/CDde">
                <description>Drag_due_to_Elevator_Deflection</description>
                <product>
                    <property>aero/qbar-psf</property>
                    <property>metrics/Sw-sqft</property>
                    <property>fcs/elevator-pos-norm</property>
                    <value>0.04</value>
                </product>
            </function>
        </axis>
        <axis name="SIDE" unit="LBS">
            <function name="aero/coefficient/CYb">
                <description>Side_force_due_to_beta</description>
                <product>
                    <property>aero/qbar-psf</property>
                    <property>metrics/Sw-sqft</property>
                    <property>aero/beta-rad</property>
                    <value>-1</value>
                </product>
            </function>
        </axis>
        <axis name="ROLL" unit="LBS*FT">
            <function name="aero/coefficient/Clb">
                <description>Roll_moment_due_to_beta</description>
                <product>
                    <property>aero/qbar-psf</property>
                    <property>metrics/Sw-sqft</property>
                    <property>metrics/bw-ft</property>
                    <property>aero/beta-rad</property>
                    <value>-0.1</value>
                </product>
            </function>
            <function name="aero/coefficient/Clp">
                <description>Roll_moment_due_to_roll_rate</description>
                <product>
                    <property>aero/qbar-psf</property>
                    <property>metrics/Sw-sqft</property>
                    <property>metrics/bw-ft</property>
                    <property>aero/bi2vel</property>
                    <property>velocities/p-aero-rad_sec</property>
                    <value>-0.4</value>
                </product>
            </function>
            <function name="aero/coefficient/Clr">
                <description>Roll_moment_due_to_yaw_rate</description>
                <product>
                    <property>aero/qbar-psf</property>
                    <property>metrics/Sw-sqft</property>
                    <property>metrics/bw-ft</property>
                    <property>aero/bi2vel</property>
                    <property>velocities/r-aero-rad_sec</property>
                    <value>0.15</value>
                </product>
            </function>
            <function name="aero/coefficient/Clda">
                <description>Roll_moment_due_to_aileron</description>
                <product>
                    <property>aero/qbar-psf</property>
                    <property>metrics/Sw-sqft</property>
                    <property>metrics/bw-ft</property>
                    <property>fcs/left-aileron-pos-rad</property>
                    <value>0.1</value>
                </product>
            </function>
            <function name="aero/coefficient/Cldr">
                <description>Roll_moment_due_to_rudder</description>
                <product>
                    <property>aero/qbar-psf</property>
                    <property>metrics/Sw-sqft</property>
                    <property>metrics/bw-ft</property>
                    <property>fcs/rudder-pos-rad</property>
                    <value>0.01</value>
                </product>
            </function>
        </axis>
        <axis name="PITCH" unit="LBS*FT">
            <function name="aero/coefficient/Cmalpha">
                <description>Pitch_moment_due_to_alpha</description>
                <product>
                    <property>aero/qbar-psf</property>
                    <property>metrics/Sw-sqft</property>
                    <property>metrics/cbarw-ft</property>
                    <property>aero/alpha-wing-rad</property>
                    <value>-0.4</value><!---0.4-->
                </product>
            </function>
            <function name="aero/coefficient/Cmde">
                <description>Pitch_moment_due_to_elevator</description>
                <product>
                    <property>aero/qbar-psf</property>
                    <property>metrics/Sw-sqft</property>
                    <property>metrics/cbarw-ft</property>
                    <property>fcs/elevator-pos-rad</property>
                    <value>-0.7</value>
                </product>
            </function>
            <function name="aero/coefficient/Cmq">
                <description>Pitch_moment_due_to_pitch_rate</description>
                <product>
                    <property>aero/qbar-psf</property>
                    <property>metrics/Sw-sqft</property>
                    <property>metrics/cbarw-ft</property>
                    <property>aero/ci2vel</property>
                    <property>velocities/q-aero-rad_sec</property>
                    <value>-22</value>
                </product>
            </function>
            <function name="aero/coefficient/Cmadot">
                <description>Pitch_moment_due_to_alpha_rate</description>
                <product>
                    <property>aero/qbar-psf</property>
                    <property>metrics/Sw-sqft</property>
                    <property>metrics/cbarw-ft</property>
                    <property>aero/ci2vel</property>
                    <property>aero/alphadot-rad_sec</property>
                    <value>-8</value>
                </product>
            </function>
        </axis>
        <axis name="YAW" unit="LBS*FT">
            <function name="aero/coefficient/Cnb">
                <description>Yaw_moment_due_to_beta</description>
                <product>
                    <property>aero/qbar-psf</property>
                    <property>metrics/Sw-sqft</property>
                    <property>metrics/bw-ft</property>
                    <property>aero/beta-rad</property>
                    <value>0.12</value>
                </product>
            </function>
            <function name="aero/coefficient/Cnr">
                <description>Yaw_moment_due_to_yaw_rate</description>
                <product>
                    <property>aero/qbar-psf</property>
                    <property>metrics/Sw-sqft</property>
                    <property>metrics/bw-ft</property>
                    <property>aero/bi2vel</property>
                    <property>velocities/r-aero-rad_sec</property>
                    <value>-0.15</value>
                </product>
            </function>
            <function name="aero/coefficient/Cndr">
                <description>Yaw_moment_due_to_rudder</description>
                <product>
                    <property>aero/qbar-psf</property>
                    <property>metrics/Sw-sqft</property>
                    <property>metrics/bw-ft</property>
                    <property>fcs/rudder-pos-rad</property>
                    <value>-0.1</value>
                </product>
            </function>
            <function name="aero/coefficient/Cnda">
                <description>Adverse_yaw</description>
                <product>
                    <property>aero/qbar-psf</property>
                    <property>metrics/Sw-sqft</property>
                    <property>metrics/bw-ft</property>
                    <property>fcs/left-aileron-pos-rad</property>
                    <value>-0.01</value>
                </product>
            </function>
        </axis>
    </aerodynamics>

    <output name="an2-fldata.csv" type="CSV" rate="1">
        <simulation> OFF </simulation>
        <atmosphere> OFF </atmosphere>
        <massprops> OFF </massprops>
        <aerosurfaces> ON </aerosurfaces>
        <rates> OFF </rates>
        <velocities> ON </velocities>
        <forces> OFF </forces>
        <moments> OFF </moments>
        <position> ON </position>
        <coefficients> OFF </coefficients>
        <ground_reactions> OFF </ground_reactions>
        <fcs> OFF </fcs>
        <propulsion> ON </propulsion>
	<property>propulsion/engine[0]/cht-degc</property>
	<property>propulsion/engine[0]/oil-degc</property>


    </output>
</fdm_config>
